// COMSOL Multiphysics 5.4.0.225 model "alt_configs_lite.mph"
// Outline of the model tree

Parameters
  pd = 25.4/8  // Pin Diameter
  ps = 2  // Pin Spacing
  pl = 1.35*25.4  // Pin Length
  po = 13  // Pin Overlap
  st = 5  // Stage Length
  rd = 25.4/2  // Rod Diameter
  v1 = -12500  // Rod 1 Voltage
  v2 = 0  // Rod 2 Voltage
  v3 = 0  // Rod 3 Voltage
  v4 = 0  // Rod 4 Voltage
  n = 16  // Pin Pairs
  nb = 4

Geometry
  geom1 "Geometry 1" (3D, length unit mm)
    cyl1: Cylinder "Pin1" | pos = {ps/2+pd/2, -po/2 + pd/2, -st*n/2+st/2}; axistype = y; r = pd/2; h = pl - pd/2
    sph1: Sphere | pos = {ps/2+pd/2, -po/2 + pd/2, -st*n/2+st/2}; r = pd/2
    uni1: Union | input = cyl1, sph1; intbnd = off; face = all
    cyl2: Cylinder "Rod 1" | pos = {ps/2 + pd/2, -po/2 + pl -rd/2 - .1, -st*n/2}; r = rd/2; h = st*n
    rot1: Rotate | input = uni1, cyl2; keep = on; rot = 180
    rot2: Rotate | input = uni1, cyl2, rot1; keep = on; rot = 90
    mov1: Move | input = rot2(1), rot2(3); displx = 0; disply = 0; displz = st
    arr1: Array
      contributeto = csel1
      input = uni1
      size = {1, 1, round(n/2)}
      fullsize = {1, 1, round(n/2)}
      displ = {0, 0, st*2}
    arr2: Array
      contributeto = csel2
      input = rot1(1)
      size = {1, 1, round(n/2)}
      fullsize = {1, 1, round(n/2)}
      displ = {0, 0, st*2}
    arr3: Array
      contributeto = csel3
      input = mov1(2)
      size = {1, 1, round(n/2-.1)}
      fullsize = {1, 1, round(n/2-.1)}
      displ = {0, 0, st*2}
    arr4: Array
      contributeto = csel4
      input = mov1(1)
      size = {1, 1, round(n/2-.1)}
      fullsize = {1, 1, round(n/2-.1)}
      displ = {0, 0, st*2}
    cyl3: Cylinder "Fine Mesh" | contributeto = csel6; pos = {0, 0, -3*st}; r = 3; h = 6*st
    cyl4: Cylinder "Finer Mesh" (disabled) | pos = {0, 0, -st}; r = pd/4; h = 2*st
    cyl5: Cylinder "Finest Mesh" (disabled) | pos = {0, 0, -st}; r = pd/8; h = 2*st
    sph2: Sphere "Boundary" (disabled) | r = sqrt(pl^2 + (st*n/2)^2)*2
    cyl6: Cylinder "Chamber" | pos = {0, 0, -st*n}; r = 75; h = st*n*2
    imp1: Import (disabled)
      contributeto = csel5
      type = cad
      filename = /run/user/337073/gvfs/sftp:host=jilafile.colorado.edu,user=dare4983/scratch/ye/common/ColdMolecules/Machine Drawings/CMMIII/Chamber Full/Differential Pumping/Differential-Pumping.STEP
      fillholes = on
    rot3: Rotate "Rotate Glass" (disabled) | input = imp1; rot = 45-180*atan((ps/2+pd/2)/(-po/2+pl-rd/2-.1))/3.1415926535
    mov2: Move "Center Glass" (disabled) | input = rot3; displx = 0; disply = 0; displz = 6.35*(2-nb)
    arr5: Array "Array Glass" (disabled)
      contributeto = csel5
      input = mov2
      size = {1, 1, nb}
      fullsize = {1, 1, nb}
      displ = {0, 0, 12.7}
    imp2: Import (disabled)
      type = cad
      filename = /run/user/337073/gvfs/sftp:host=jilafile.colorado.edu,user=dare4983/scratch/ye/common/ColdMolecules/Machine Drawings/CMMII/Updated 3D Models 2015/Chamber Full/Decelerator/DecTrapMacorCapSlots.STEP
      fillholes = on
    rot4: Rotate "Rotate Macor" (disabled) | input = imp2; rot = 180; axistype = y
    fin: Finalize "Form Union"

Materials
  mat1: Common "Air" on all domains
    def "Basic"
      relpermeability = 1
      relpermittivity = 1
      dynamicviscosity = eta(T[1/K])[Pa*s]
      ratioofspecificheat = 1.4
      electricconductivity = 0[S/m]
      heatcapacity = Cp(T[1/K])[J/(kg*K)]
      density = rho(pA[1/Pa],T[1/K])[kg/m^3]
      thermalconductivity = k(T[1/K])[W/(m*K)]
      soundspeed = cs(T[1/K])[m/s]
      eta: Piecewise | arg = T; pieces = {200.0, 1600.0, -8.38278E-7+8.35717342E-8*T^1-7.69429583E-11*T^2+4.6437266E-14*T^3-1.06585607E-17*T^4}
      Cp: Piecewise | arg = T; pieces = {200.0, 1600.0, 1047.63657-0.372589265*T^1+9.45304214E-4*T^2-6.02409443E-7*T^3+1.2858961E-10*T^4}
      rho: Analytic | expr = pA*0.02897/8.314/T; args = {pA, T}; dermethod = manual; argders = {{pA, d(pA*0.02897/8.314/T,pA)}, {T, d(pA*0.02897/8.314/T,T)}}
      k: Piecewise | arg = T; pieces = {200.0, 1600.0, -0.00227583562+1.15480022E-4*T^1-7.90252856E-8*T^2+4.11702505E-11*T^3-7.43864331E-15*T^4}
      cs: Analytic | expr = sqrt(1.4*287*T); args = T; dermethod = manual; argders = {T, d(sqrt(1.4*287*T),T)}
    RefractiveIndex
      n = 1
      ki = 0
  mat2: Common "Glass" on no domains
    def "Basic"
      relpermittivity = 7.75

Physics
  es: Electrostatics on all domains
    dependent variable V
    ccn1: ChargeConservation (default)
    zc1: ZeroCharge (default)
    init1: init "Initial Values 1" (default)
    pot1: ElectricPotential "Rod 1 Pins" on selection geom1_csel1_bnd | V0 = v1
    pot2: ElectricPotential "Rod 2 Pins" on selection geom1_csel2_bnd | V0 = v2
    pot3: ElectricPotential "Rod 3 Pins" on selection geom1_csel3_bnd | V0 = v3
    pot4: ElectricPotential "Rod 4 Pins" on selection geom1_csel4_bnd | V0 = v4
    pot5: ElectricPotential "Rod 1" on boundaries 303-306, 512, 515, 518, 521, 524, 527, 530, 533, 536, 539, 542, 545, 548, 551, 554, 613, 617, 620, 623, 626, 629, 632, 635, 638, 639, 642, 645, 648, 651, 654, 657, 660
      V0 = v1
    pot6: ElectricPotential "Rod 2" on boundaries 147-150, 241, 244, 247, 250, 253, 256, 259, 262, 268, 271, 274, 277, 280, 283, 286, 357, 358, 361, 364, 367, 370, 373, 376, 379, 382, 386, 389, 392, 395, 398, 401, 404
      V0 = v2
    pot7: ElectricPotential "Rod 3" on boundaries 695-697, 704, 705, 710, 711, 716, 717, 722, 723, 728, 729, 734, 735, 740, 741, 746-749, 752, 755, 758, 761, 764, 767, 770, 773, 776, 779, 782, 785, 788, 791, 794
      V0 = v3
    pot8: ElectricPotential "Rod 4" on boundaries 45-49, 54, 55, 60, 61, 66, 67, 72, 73, 78, 79, 84, 85, 90, 91, 96-98, 102, 105, 108, 111, 114, 117, 120, 126, 129, 132, 135, 138, 141, 144
      V0 = v4

Mesh
  mesh1 "Mesh 1"
    size: MeshSizeDefault | hauto = 2
    ftet1: FreeTet "Free Tetrahedral 1" on entire geometry | method = dellegacy52
    ref1: Refine on selection geom1_csel6_dom | numrefine = 2
    ref2: Refine (disabled) on no domains | numrefine = 2

Studies
  std1 "Study 1"
    param: Parametric "Parametric Sweep"
      pname = {v1, v2, v3, v4}
      plistarr = {"-12500,0,12500,25000,0", "12500,12500,12500,25000,0", "0,0,0,0,-12500", "0,0,0,0,12500"}
      punit = {, , , }
    stat: Stationary

Solver configurations
  sol1 "Solution 1" (study std1)
    v1: Variables "Dependent Variables 1"
    s1: Stationary "Stationary Solver 1"
      p1: Parametric
        pname = {v1, v2, v3, v4}
        plistarr = {"-12500,0,12500,25000,0", "12500,12500,12500,25000,0", "0,0,0,0,-12500", "0,0,0,0,12500"}
        punit = {, , , }
        pcontinuationmode = no
      fc1: FullyCoupled
      i1: Iterative | linsolver = cg
        mg1: Multigrid | prefun = amg

Datasets
  cpl1: CutPlane "WZ" | data = dset1; planetype = general; genpoints = {{0, 0, 0}, {0, 0, 1}, {-1, -1, 0}}
  dset1: Solution | solution = sol1

Tables
  tbl1: Table
    // Global Evaluation 1 (es.intWe)
    Total electric energy (J) | Total electric energy (J) | Total electric energy (J) | Total electric energy (J) | Total electric energy (J)
    0.00104182 | 0.00104182 | 0.00104182 | 0.00104039 | 0.000908335
  tbl2: Table
    // Global Evaluation 1 (es.intWe)
    Total electric energy (J) | Total electric energy (J) | Total electric energy (J) | Total electric energy (J) | Total electric energy (J)
    0.00134046 | 0.00134072 | 0.00134122 | 0.00135065 | 0.00136384
  tbl3: Table
    // Global Evaluation 1 (es.intWe)
    Total electric energy (J) | Total electric energy (J)
    0.00134769 | 0.000902502
  tbl4: Table
    // Global Evaluation 1 (es.intWe)
    Total electric energy (J) | Total electric energy (J) | Total electric energy (J)
    0.0017858 | 0.0037503 | 0.00777158
  tbl5: Table
    // Global Evaluation 1 (es.intWe)
    Total electric energy (J) | Total electric energy (J)
    0.00765411 | 0.00453006

Plots
  pg4: PlotGroup2D "Alternate Configuration Plots" | data = cpl1
    surf1: Surface "Field Norm" | expr = es.normE + (es.normE<10 [V/cm])*(200 [kV/cm]); unit = kV/cm
    str1: Streamline (disabled) | planecoordsys = cartesian; expr = {es.Ex, es.Ey, es.Ez}; udist = 0.003
    con1: Contour
      expr = es.normE
      unit = kV/cm
      descr = Electric field norm
      levelmethod = levels
      levels = range(0,10,200)
  pg3: PlotGroup2D "Check Domain" (disabled) | data = cpl1
    surf1: Surface | expr = dom; descr = Entity index